// COMSOL Multiphysics 5.4.0.388 model "oil on sticky water.mph"
// Outline of the model tree

Parameters
  g = 9.8 [m/s^2]
  rho2 = 1000 [kg/m^3]  // Density of underlying fluid
  mu2 = 60 [Pa*s]  // Viscosity of underlying fluid

Common definitions
  free1: DeformingDomain on domains 1, 2 | smoothingType = hyperelastic
  pnmv1: PrescribedNormalMeshVelocity on boundaries 4, 5, 8 | prescribedNormalVelocity = u*nx+v*ny
  slip1: Slip "Mesh Slip 1" on boundaries 1, 3, 6, 7

Geometry
  geom1 "Geometry 1" (2D, length unit m)
    b1: BezierPolygon "Bézier Polygon 1"
      p = {{-.85, -.6, -.5, -.4, 1, 1, -0.85}, {0.6, 0.6, 0.5, 0.5, 0.5, 0, 0}}
      degree = {3, 1, 1, 1}
      w = {1, 1, 1, 0.1, 1, 1, 1, 1, 1, 1}
    sca1: Scale | input = b1; type = anisotropic; anisotropic = {2, -1}; factor = {2, -1}
    mov1: Move (disabled) | input = sca1; displx = 0; disply = .04271134
    r2: Rectangle | pos = {-1.7, -0.8}; size = {3.7, 0.8}
    fin: Finalize "Form Union"

Materials
  mat1: Common "Tar" on domains 2
    def "Basic"
      density = 917
      dynamicviscosity = 1e4
      thermalconductivity = .136
      heatcapacity = 1670
      ratioofspecificheat = 1
  mat2: Common "Sticky Water" on domains 1
    def "Basic"
      density = rho2
      dynamicviscosity = mu2

Physics
  spf: LaminarFlow on all domains
    dependent variable u = {u, v, w}
    fp1: FluidProperties (default)
    init1: init "Initial Values 1" (default)
    wallbc1: WallBC "Wall 1" (default) | BoundaryCondition = Slip
    vf1: VolumeForce on domains 1, 2 | F = {0, -spf.rho*g, 0}
    bs2: BoundaryStress on boundaries 4
  ht: HeatTransferInFluids on domains 2
    dependent variable T
    fluid1: FluidHeatTransferModel "Fluid 1" (default)
    init1: init "Initial Values 1" (default)
    ins1: ThermalInsulation (default)
    temp1: TemperatureBoundary "Temperature 1" on boundaries 4 | T0 = 274
    temp2: TemperatureBoundary "Temperature 2" on boundaries 5, 8

Multiphysics
  fc1: FlowCoupling | Source_physics = spf; Destination_physics = ht
  tc1: TemperatureCoupling | TemperatureSource_physics = ht; TemperatureDestination_physics = spf

Mesh
  mesh1 "Mesh 1"
    size: MeshSizeDefault | table = cfd
    ftri1: FreeTri "Free Triangular 1" on entire geometry

Studies
  std1 "Study 1"
    param: Parametric "Parametric Sweep" | pname = mu2; plistarr = {0.1,1,10,100,1000}; punit = Pa*s
    stat: Stationary | solve for = {ht}; activateCoupling = {fc1, off, tc1, off}
    time: Transient "Time Dependent" | tlist = range(0,2,200); useinitsol = on; initmethod = sol; initstudy = std1

Solver configurations
  sol1 "Solution 1" (study std1)
    v1: Variables "Dependent Variables 1"
      comp1_spatial_disp: Field "Spatial mesh displacement (comp1.spatial.disp)"
        scalemethod = manual
        scaleval = 0.0316615697653
    s1: Stationary "Stationary Solver 1"
      fc1: FullyCoupled | linsolver = d1; initstep = 0.01; minstep = 1.0E-6; maxiter = 50
      d1: Direct "PARDISO (ht)" | linsolver = pardiso; pivotperturb = 1.0E-13
    su1: StoreSolution
    v2: Variables "Dependent Variables 2" | initmethod = sol; resscalemethod = manual; notsolmethod = sol
      comp1_spatial_disp: Field "Spatial mesh displacement (comp1.spatial.disp)"
        scalemethod = manual
        scaleval = 0.0316615697653
    t1: Time "Time-Dependent Solver 1"
      tlist = range(0,2,200)
      rtol = 0.005
      atolglobalfactor = 0.05
      atolmethod = {comp1_p, scaled, comp1_spatial_disp, global, comp1_spatial_lm, global, comp1_spatial_lm_nv, global, comp1_T, global, comp1_u, global}
      atolfactor = {comp1_p, 1, comp1_spatial_disp, 0.1, comp1_spatial_lm, 0.1, comp1_spatial_lm_nv, 0.1, comp1_T, 0.1, comp1_u, 0.1}
      maxorder = 2
      stabcntrl = on
      bwinitstepfrac = 0.01
      estrat = exclude
      se1: Segregated | ntolfact = 0.5; segstabacc = segaacc; segaaccdim = 5; segaaccmix = 0.9; segaaccdelay = 1
        ss1: SegregatedStep "Heat transfer T" | linsolver = d1; subdamp = 0.7
        ss2: SegregatedStep "Velocity u, Pressure p"
          segvar = {comp1_u, comp1_p}
          linsolver = d2
          subdamp = 0.8
          subjtech = once
        ss3: SegregatedStep "Spatial mesh displacement"
          segvar = {comp1_spatial_disp, comp1_spatial_lm, comp1_spatial_lm_nv}
          linsolver = d3
          subdamp = 0.8
          subjtech = once
        ll1: LowerLimit | lowerlimit = comp1.T 0
      d1: Direct
      d2: Direct | linsolver = pardiso; pivotperturb = 1.0E-13
      d3: Direct | linsolver = pardiso; pivotperturb = 1.0E-13
  sol2 "Parametric Solutions 1" (study std1)
  sol8 "Solution Store 1" (study std1)

Datasets
  dset1: Solution | solution = sol1
  edg1: Edge2D "Top surface" on boundaries 4 | data = dset1
  edg2: Edge2D "Bottom" on boundaries 5, 8 | data = dset1
  dset2: Solution | solution = sol2
  cpt1: CutPoint2D "Top left corner" | data = dset2; pointx = -1.6; pointy = 0; bndsnap = on
  dset3: Solution | solution = sol8

Plots
  pg1: PlotGroup2D "Velocity (spf)" | data = dset1
    surf1: Surface | expr = spf.U * (spf.rho < 950)
    mesh1: Mesh (disabled)
    arws1: ArrowSurface | expr = {u, v}
  pg2: PlotGroup2D "Pressure (spf)" | data = dset1
    con1: Contour | expr = p; unit = Pa; descr = Pressure
  pg3: PlotGroup1D "Top" | data = edg1
    lngr1: LineGraph | expr = y; unit = m; descr = y-coordinate; expressionintitle = on
  pg4: PlotGroup1D "Bottom" | data = edg2
    lngr1: LineGraph | expr = y; unit = m; descr = y-coordinate
  pg5: PlotGroup2D "Velocity (spf) 1" | data = dset2
    surf1: Surface | expr = spf.U
  pg6: PlotGroup2D "Pressure (spf) 1" | data = dset2
    con1: Contour | expr = p; unit = Pa; descr = Pressure
  pg7: PlotGroup1D "1D Plot Group 7" | data = cpt1
    ptgr1: PointGraph | expr = y; unit = m; descr = y-coordinate; autopoint = off
  pg8: PlotGroup2D "2D Plot Group 8" | data = dset1
    surf1: Surface | expr = T; unit = K; descr = Temperature

Exports
  anim1: Animation | target = player; options = off; axes = on